// COMSOL Multiphysics 6.1.0.282 model "Patient_Inspired.mph"
// Outline of the model tree

Parameters
  n_vert = 10
  vertebral_spacing = 22[mm]
  vertebral_width = 35[mm]
  vertebral_depth = 25[mm]
  vertebral_height = 14[mm]
  disc_height = 6[mm]
  scoliosis_curvature = 28[mm]
  spine_length = n_vert*(vertebral_height+disc_height)
  rod_diameter = 5.5[mm]
  rod_curvature = 0.5
  rod_post_offset = 20[mm]
  screw_diameter = 5[mm]
  screw_length = 12[mm]
  vert_E = 100[MPa]
  vert_nu = 0.3
  vert_rho = 1900[kg/m^3]
  disc_E = 4[MPa]
  disc_nu = 0.45
  disc_rho = 1100[kg/m^3]
  NiTi_E = 60[GPa]
  NiTi_nu = 0.33
  NiTi_rho = 6450[kg/m^3]
  screw_E = 110[GPa]
  screw_nu = 0.34
  screw_rho = 4500[kg/m^3]
  applied_load = 40[N]

Geometry
  geom1 "Geometry 1" (3D, length unit mm)
    ell1: Ellipsoid
      contributeto = csel_vertebrae
      pos = {scoliosis_curvature*sin(pi*0*(vertebral_height+disc_height)/spine_length), 0, 0*(vertebral_height+disc_height)}
      semiaxes = {vertebral_width/2, vertebral_depth/2, vertebral_height/2}
    disc1: Cylinder
      contributeto = csel_discs
      pos = {scoliosis_curvature*sin(pi*(0+0.5)*(vertebral_height+disc_height)/spine_length), 0, 0*(vertebral_height+disc_height)+vertebral_height/2}
      axistype = cartesian
      r = vertebral_width/2*0.85
      h = disc_height
    fix1: Cylinder "Cylinder 1a" (disabled)
      contributeto = csel_fixation
      pos = {scoliosis_curvature*sin(pi*0*(vertebral_height+disc_height)/spine_length), vertebral_depth/2*0.9, 0*(vertebral_height+disc_height)}
      axis = {0, 1, 0}
      axistype = cartesian
      r = screw_diameter/2
      h = screw_length
    ell2: Ellipsoid
      contributeto = csel_vertebrae
      pos = {scoliosis_curvature*sin(pi*1*(vertebral_height+disc_height)/spine_length), 0, 1*(vertebral_height+disc_height)}
      semiaxes = {vertebral_width/2, vertebral_depth/2, vertebral_height/2}
    disc2: Cylinder
      contributeto = csel_discs
      pos = {scoliosis_curvature*sin(pi*(1+0.5)*(vertebral_height+disc_height)/spine_length), 0, 1*(vertebral_height+disc_height)+vertebral_height/2}
      axistype = cartesian
      r = vertebral_width/2*0.85
      h = disc_height
    fix2: Cylinder "Cylinder 2a" (disabled)
      contributeto = csel_fixation
      pos = {scoliosis_curvature*sin(pi*1*(vertebral_height+disc_height)/spine_length), vertebral_depth/2*0.9, 1*(vertebral_height+disc_height)}
      axis = {0, 1, 0}
      axistype = cartesian
      r = screw_diameter/2
      h = screw_length
    ell3: Ellipsoid
      contributeto = csel_vertebrae
      pos = {scoliosis_curvature*sin(pi*2*(vertebral_height+disc_height)/spine_length), 0, 2*(vertebral_height+disc_height)}
      semiaxes = {vertebral_width/2, vertebral_depth/2, vertebral_height/2}
    disc3: Cylinder
      contributeto = csel_discs
      pos = {scoliosis_curvature*sin(pi*(2+0.5)*(vertebral_height+disc_height)/spine_length), 0, 2*(vertebral_height+disc_height)+vertebral_height/2}
      axistype = cartesian
      r = vertebral_width/2*0.85
      h = disc_height
    fix3: Cylinder "Cylinder 3a" (disabled)
      contributeto = csel_fixation
      pos = {scoliosis_curvature*sin(pi*2*(vertebral_height+disc_height)/spine_length), vertebral_depth/2*0.9, 2*(vertebral_height+disc_height)}
      axis = {0, 1, 0}
      axistype = cartesian
      r = screw_diameter/2
      h = screw_length
    ell4: Ellipsoid
      contributeto = csel_vertebrae
      pos = {scoliosis_curvature*sin(pi*3*(vertebral_height+disc_height)/spine_length), 0, 3*(vertebral_height+disc_height)}
      semiaxes = {vertebral_width/2, vertebral_depth/2, vertebral_height/2}
    disc4: Cylinder
      contributeto = csel_discs
      pos = {scoliosis_curvature*sin(pi*(3+0.5)*(vertebral_height+disc_height)/spine_length), 0, 3*(vertebral_height+disc_height)+vertebral_height/2}
      axistype = cartesian
      r = vertebral_width/2*0.85
      h = disc_height
    fix4: Cylinder "Cylinder 4a" (disabled)
      contributeto = csel_fixation
      pos = {scoliosis_curvature*sin(pi*3*(vertebral_height+disc_height)/spine_length), vertebral_depth/2*0.9, 3*(vertebral_height+disc_height)}
      axis = {0, 1, 0}
      axistype = cartesian
      r = screw_diameter/2
      h = screw_length
    ell5: Ellipsoid
      contributeto = csel_vertebrae
      pos = {scoliosis_curvature*sin(pi*4*(vertebral_height+disc_height)/spine_length), 0, 4*(vertebral_height+disc_height)}
      semiaxes = {vertebral_width/2, vertebral_depth/2, vertebral_height/2}
    disc5: Cylinder
      contributeto = csel_discs
      pos = {scoliosis_curvature*sin(pi*(4+0.5)*(vertebral_height+disc_height)/spine_length), 0, 4*(vertebral_height+disc_height)+vertebral_height/2}
      axistype = cartesian
      r = vertebral_width/2*0.85
      h = disc_height
    fix5: Cylinder "Cylinder 5a" (disabled)
      contributeto = csel_fixation
      pos = {scoliosis_curvature*sin(pi*4*(vertebral_height+disc_height)/spine_length), vertebral_depth/2*0.9, 4*(vertebral_height+disc_height)}
      axis = {0, 1, 0}
      axistype = cartesian
      r = screw_diameter/2
      h = screw_length
    ell6: Ellipsoid
      contributeto = csel_vertebrae
      pos = {scoliosis_curvature*sin(pi*5*(vertebral_height+disc_height)/spine_length), 0, 5*(vertebral_height+disc_height)}
      semiaxes = {vertebral_width/2, vertebral_depth/2, vertebral_height/2}
    disc6: Cylinder
      contributeto = csel_discs
      pos = {scoliosis_curvature*sin(pi*(5+0.5)*(vertebral_height+disc_height)/spine_length), 0, 5*(vertebral_height+disc_height)+vertebral_height/2}
      axistype = cartesian
      r = vertebral_width/2*0.85
      h = disc_height
    fix6: Cylinder "Cylinder 6a" (disabled)
      contributeto = csel_fixation
      pos = {scoliosis_curvature*sin(pi*5*(vertebral_height+disc_height)/spine_length), vertebral_depth/2*0.9, 5*(vertebral_height+disc_height)}
      axis = {0, 1, 0}
      axistype = cartesian
      r = screw_diameter/2
      h = screw_length
    ell7: Ellipsoid
      contributeto = csel_vertebrae
      pos = {scoliosis_curvature*sin(pi*6*(vertebral_height+disc_height)/spine_length), 0, 6*(vertebral_height+disc_height)}
      semiaxes = {vertebral_width/2, vertebral_depth/2, vertebral_height/2}
    disc7: Cylinder
      contributeto = csel_discs
      pos = {scoliosis_curvature*sin(pi*(6+0.5)*(vertebral_height+disc_height)/spine_length), 0, 6*(vertebral_height+disc_height)+vertebral_height/2}
      axistype = cartesian
      r = vertebral_width/2*0.85
      h = disc_height
    fix7: Cylinder "Cylinder 7a" (disabled)
      contributeto = csel_fixation
      pos = {scoliosis_curvature*sin(pi*6*(vertebral_height+disc_height)/spine_length), vertebral_depth/2*0.9, 6*(vertebral_height+disc_height)}
      axis = {0, 1, 0}
      axistype = cartesian
      r = screw_diameter/2
      h = screw_length
    ell8: Ellipsoid
      contributeto = csel_vertebrae
      pos = {scoliosis_curvature*sin(pi*7*(vertebral_height+disc_height)/spine_length), 0, 7*(vertebral_height+disc_height)}
      semiaxes = {vertebral_width/2, vertebral_depth/2, vertebral_height/2}
    disc8: Cylinder
      contributeto = csel_discs
      pos = {scoliosis_curvature*sin(pi*(7+0.5)*(vertebral_height+disc_height)/spine_length), 0, 7*(vertebral_height+disc_height)+vertebral_height/2}
      axistype = cartesian
      r = vertebral_width/2*0.85
      h = disc_height
    fix8: Cylinder "Cylinder 8a" (disabled)
      contributeto = csel_fixation
      pos = {scoliosis_curvature*sin(pi*7*(vertebral_height+disc_height)/spine_length), vertebral_depth/2*0.9, 7*(vertebral_height+disc_height)}
      axis = {0, 1, 0}
      axistype = cartesian
      r = screw_diameter/2
      h = screw_length
    ell9: Ellipsoid
      contributeto = csel_vertebrae
      pos = {scoliosis_curvature*sin(pi*8*(vertebral_height+disc_height)/spine_length), 0, 8*(vertebral_height+disc_height)}
      semiaxes = {vertebral_width/2, vertebral_depth/2, vertebral_height/2}
    disc9: Cylinder
      contributeto = csel_discs
      pos = {scoliosis_curvature*sin(pi*(8+0.5)*(vertebral_height+disc_height)/spine_length), 0, 8*(vertebral_height+disc_height)+vertebral_height/2}
      axistype = cartesian
      r = vertebral_width/2*0.85
      h = disc_height
    fix9: Cylinder "Cylinder 9a" (disabled)
      contributeto = csel_fixation
      pos = {scoliosis_curvature*sin(pi*8*(vertebral_height+disc_height)/spine_length), vertebral_depth/2*0.9, 8*(vertebral_height+disc_height)}
      axis = {0, 1, 0}
      axistype = cartesian
      r = screw_diameter/2
      h = screw_length
    ell10: Ellipsoid
      contributeto = csel_vertebrae
      pos = {scoliosis_curvature*sin(pi*9*(vertebral_height+disc_height)/spine_length), 0, 9*(vertebral_height+disc_height)}
      semiaxes = {vertebral_width/2, vertebral_depth/2, vertebral_height/2}
    fix10: Cylinder (disabled)
      contributeto = csel_fixation
      pos = {scoliosis_curvature*sin(pi*9*(vertebral_height+disc_height)/spine_length), vertebral_depth/2*0.9, 9*(vertebral_height+disc_height)}
      axis = {0, 1, 0}
      axistype = cartesian
      r = screw_diameter/2
      h = screw_length
    rodseg1: Cylinder "Cylinder 1b" (disabled)
      contributeto = csel_rod
      pos = {0.0[mm], 20.0[mm], 0.0[mm]}
      axis = {0.230879485743, 0.0, 0.97298235496}
      axistype = cartesian
      r = rod_diameter/2
      h = 12.6072858404[mm]
    rodseg2: Cylinder "Cylinder 2b" (disabled)
      contributeto = csel_rod
      pos = {2.91076367145[mm], 20.0[mm], 12.2666666667[mm]}
      axis = {0.221293802215, 0.0, 0.975207184705}
      axistype = cartesian
      r = rod_diameter/2
      h = 12.578523681[mm]
    rodseg3: Cylinder "Cylinder 3b" (disabled)
      contributeto = csel_rod
      pos = {5.69431300306[mm], 20.0[mm], 24.5333333333[mm]}
      axis = {0.202356745138, 0.0, 0.979311874582}
      axistype = cartesian
      r = rod_diameter/2
      h = 12.52580203[mm]
    rodseg4: Cylinder "Cylinder 4b" (disabled)
      contributeto = csel_rod
      pos = {8.22899353209[mm], 20.0[mm], 36.8[mm]}
      axis = {0.174589274595, 0.0, 0.98464134851}
      axistype = cartesian
      r = rod_diameter/2
      h = 12.458004821[mm]
    rodseg5: Cylinder "Cylinder 5b" (disabled)
      contributeto = csel_rod
      pos = {10.4040275567[mm], 20.0[mm], 49.0666666667[mm]}
      axis = {0.138884965142, 0.0, 0.990308520845}
      axistype = cartesian
      r = rod_diameter/2
      h = 12.38671223[mm]
    rodseg6: Cylinder "Cylinder 6b" (disabled)
      contributeto = csel_rod
      pos = {12.124355653[mm], 20.0[mm], 61.3333333333[mm]}
      axis = {0.0965925898656, 0.0, 0.995324003319}
      axistype = cartesian
      r = rod_diameter/2
      h = 12.3242950293[mm]
    rodseg7: Cylinder "Cylinder 7b" (disabled)
      contributeto = csel_rod
      pos = {13.3147912281[mm], 20.0[mm], 73.6[mm]}
      axis = {0.049546299904, 0.0, 0.99877182788}
      axistype = cartesian
      r = rod_diameter/2
      h = 12.2817507706[mm]
    rodseg8: Cylinder "Cylinder 8b" (disabled)
      contributeto = csel_rod
      pos = {13.9233065352[mm], 20.0[mm], 85.8666666667[mm]}
      axis = {1.44811698864e-16, 0.0, 1.0}
      axistype = cartesian
      r = rod_diameter/2
      h = 12.2666666667[mm]
    rodseg9: Cylinder "Cylinder 9b" (disabled)
      contributeto = csel_rod
      pos = {13.9233065352[mm], 20.0[mm], 98.1333333333[mm]}
      axis = {-0.049546299904, 0.0, 0.99877182788}
      axistype = cartesian
      r = rod_diameter/2
      h = 12.2817507706[mm]
    rodseg10: Cylinder "Cylinder 10a" (disabled)
      contributeto = csel_rod
      pos = {13.3147912281[mm], 20.0[mm], 110.4[mm]}
      axis = {-0.0965925898656, 0.0, 0.995324003319}
      axistype = cartesian
      r = rod_diameter/2
      h = 12.3242950293[mm]
    rodseg11: Cylinder (disabled)
      contributeto = csel_rod
      pos = {12.124355653[mm], 20.0[mm], 122.666666667[mm]}
      axis = {-0.138884965142, 0.0, 0.990308520845}
      axistype = cartesian
      r = rod_diameter/2
      h = 12.38671223[mm]
    rodseg12: Cylinder (disabled)
      contributeto = csel_rod
      pos = {10.4040275567[mm], 20.0[mm], 134.933333333[mm]}
      axis = {-0.174589274595, 0.0, 0.98464134851}
      axistype = cartesian
      r = rod_diameter/2
      h = 12.458004821[mm]
    rodseg13: Cylinder (disabled)
      contributeto = csel_rod
      pos = {8.22899353209[mm], 20.0[mm], 147.2[mm]}
      axis = {-0.202356745138, 0.0, 0.979311874582}
      axistype = cartesian
      r = rod_diameter/2
      h = 12.52580203[mm]
    rodseg14: Cylinder (disabled)
      contributeto = csel_rod
      pos = {5.6943130030612[mm], 20.0[mm], 159.466666667[mm]}
      axis = {-0.221293802215, 0.0, 0.975207184705}
      axistype = cartesian
      r = rod_diameter/2
      h = 12.578523681[mm]
    rodseg15: Cylinder (disabled)
      contributeto = csel_rod
      pos = {2.91076367145[mm], 20.0[mm], 171.733333333[mm]}
      axis = {-0.230879485743, 0.0, 0.97298235496}
      axistype = cartesian
      r = rod_diameter/2
      h = 12.6072858404[mm]
    fin: Finalize "Form Union"

Materials
  mat6: Common "Titanium [solid,annealed] 3" on all domains
    def "Basic"
      thermalconductivity = k(T)
      thermalexpansioncoefficient = (alpha_solid_1(T)+(Tempref-293[K])*if(abs(T-Tempref)>1e-3,(alpha_solid_1(T)-alpha_solid_1(Tempref))/(T-Tempref),d(alpha_solid_1(T),T)))/(1+alpha_solid_1(Tempref)*(Tempref-293[K]))
      heatcapacity = C_solid_1(T)
      HC = HC_solid_1(T)
      VP = VP_solid_1(T)
      density = 4500[kg/m^3]
      TD = TD(T)
      k: Piecewise
        arg = T
        pieces = 
          {0.0, 49.0, 1.47203494*T^1-0.00748788311*T^2+6.93238802E-4*T^3-3.09283072E-5*T^4+2.94008701E-7*T^5}
          {49.0, 350.0, 60.278896-0.576939315*T^1+0.00429043707*T^2-1.81326748E-5*T^3+4.23859557E-8*T^4-5.09360595E-11*T^5+2.45315909E-14*T^6}
          {350.0, 977.0, 64.7176575-0.361266955*T^1+0.00121955168*T^2-2.26082437E-6*T^3+2.38879699E-9*T^4-1.34012745E-12*T^5+3.09854262E-16*T^6}
          {977.0, 1950.0, 12.3969792+0.0103457471*T^1-3.14407683E-6*T^2+1.07006076E-9*T^3}
        argunit = K
        fununit = W/(m*K)
      alpha_solid_1: Piecewise | arg = T; pieces = {0.0, 1144.0, 5.034683E-6+2.527512E-8*T^1-7.155452E-11*T^2+1.068357E-13*T^3-7.796841E-17*T^4+2.218768E-20*T^5}; argunit = K; fununit = 1/K
      C_solid_1: Piecewise
        arg = T
        pieces = 
          {10.0, 33.0, 9.13573258-2.93320246*T^1+0.396543399*T^2-0.0265749341*T^3+0.00101746797*T^4-1.92115965E-5*T^5+1.46728468E-7*T^6}
          {33.0, 96.0, 676.916067-70.9410915*T^1+2.91680568*T^2-0.0590705074*T^3+6.60355252E-4*T^4-3.85791971E-6*T^5+9.16647481E-9*T^6}
          {96.0, 218.0, -1170.759+40.2773217*T^1-0.467899615*T^2+0.00305894736*T^3-1.14042773E-5*T^4+2.26910246E-8*T^5-1.87290209E-11*T^6}
          {218.0, 600.0, 229.877083+1.59823858*T^1-0.00264554353*T^2+1.64491259E-6*T^3}
          {600.0, 1156.0, 2272.27593-11.0071313*T^1+0.0253566151*T^2-2.47634783E-5*T^3+8.82915462E-9*T^4}
          {1156.0, 1944.0, 353.069006+0.123132708*T^1+6.66181848E-5*T^2}
        argunit = K
        fununit = J/(kg*K)
      HC_solid_1: Piecewise
        arg = T
        pieces = 
          {10.0, 33.0, 0.437300111-0.140403602*T^1+0.0189813429*T^2-0.00127206237*T^3+4.8703139E-5*T^4-9.1960149E-7*T^5+7.02345156E-9*T^6}
          {33.0, 96.0, 32.4019412-3.39573722*T^1+0.139618737*T^2-0.00282752798*T^3+3.16092249E-5*T^4-1.84667043E-7*T^5+4.38771649E-10*T^6}
          {96.0, 218.0, -56.0407219+1.92795456*T^1-0.0223969508*T^2+1.46422633E-4*T^3-5.45888543E-7*T^4+1.08615127E-9*T^5-8.96502044E-13*T^6}
          {218.0, 600.0, 11.0035313+0.0765028861*T^1-1.26634232E-4*T^2+7.87370308E-8*T^3}
          {600.0, 1156.0, 108.767036-0.526878355*T^1+0.0012137451*T^2-1.18535342E-6*T^3+4.22625145E-10*T^4}
          {1156.0, 1944.0, 16.9003541+0.00589399335*T^1+3.18881265E-6*T^2}
        argunit = K
        fununit = J/(mol*K)
      VP_solid_1: Piecewise | arg = T; pieces = {293.0, 1941.0, (exp((-2.49910000e+04/T-1.33760000e+00*log10(T)+1.48058100e+01)*log(10.0)))*1.33320000e+02}; argunit = K; fununit = Pa
      rho_solid_1: Piecewise
        arg = T
        pieces = 
          {0.0, 20.0, 4520.168}
          {20.0, 160.0, 4520.925-0.07042247*T^1+0.002149145*T^2-2.875466E-5*T^3+1.417353E-7*T^4-2.481938E-10*T^5}
          {160.0, 1144.0, 4525.567-0.05296616*T^1-1.538843E-4*T^2+1.427212E-7*T^3-5.386443E-11*T^4}
        argunit = K
        fununit = kg/m^3
      TD: Piecewise
        arg = T
        pieces = 
          {10.0, 27.0, -0.0104772444+0.00531272312*T^1-8.05224496E-4*T^2+5.97768035E-5*T^3-2.40100092E-6*T^4+5.01691784E-8*T^5-4.28434495E-10*T^6}
          {27.0, 77.0, 0.00501547606-4.20433612E-4*T^1+1.57179473E-5*T^2-3.25551553E-7*T^3+3.8742894E-9*T^4-2.48336757E-11*T^5+6.64604268E-14*T^6}
          {77.0, 203.0, 4.56542007E-4-1.57114976E-5*T^1+2.42922739E-7*T^2-2.04777574E-9*T^3+9.79544853E-12*T^4-2.50470004E-14*T^5+2.66452189E-17*T^6}
          {203.0, 373.0, 1.0855539E-4-1.81330376E-6*T^1+1.47164366E-8*T^2-6.51338464E-11*T^3+1.62102182E-13*T^4-2.1358051E-16*T^5+1.16155082E-19*T^6}
          {373.0, 743.0, -1.93472343E-5+4.12172881E-7*T^1-2.22123738E-9*T^2+5.86348472E-12*T^3-8.26888548E-15*T^4+5.98385307E-18*T^5-1.74658776E-21*T^6}
          {743.0, 1144.0, 2.79890238E-5-2.88294251E-7*T^1+1.3176655E-9*T^2-2.86264632E-12*T^3+3.23439339E-15*T^4-1.83252324E-18*T^5+4.10236029E-22*T^6}
        argunit = K
        fununit = m^2/s
    ThermalExpansion
      dL = (dL_solid_1(T)-dL_solid_1(Tempref))/(1+dL_solid_1(Tempref))
      dL_solid_1: Piecewise
        arg = T
        pieces = 
          {0.0, 60.0, -0.00149093743-2.5E-8*T^1+6.25E-9*T^2}
          {60.0, 200.0, -0.00174469267+2.06346114E-5*T^1-6.15632414E-7*T^2+8.73680313E-9*T^3-6.02408298E-11*T^4+2.04927885E-13*T^5-2.74884259E-16*T^6}
          {200.0, 1144.0, -0.00130828925-4.72948429E-6*T^1+5.74408148E-8*T^2-1.25795799E-10*T^3+1.50784011E-13*T^4-9.19119542E-17*T^5+2.2474283E-20*T^6}
        argunit = K
    Enu "Young's modulus and Poisson's ratio"
      E = 110[GPa]
      nu = 0.3
      E: Piecewise
        arg = T
        pieces = 
          {93.0, 293.0, 1.263539E11-4.823066E7*T^1-32810.22*T^2}
          {293.0, 1073.16, 1.267923E11-5.931971E7*T^1}
        argunit = K
        fununit = Pa
      nu: Piecewise | arg = T; pieces = {293.0, 1073.16, 0.3207911+6.715403E-5*T^1-4.131016E-8*T^2+5.510325E-11*T^3}; argunit = K
    KG "Bulk modulus and shear modulus"
      K = kappa(T)
      G = mu(T)
      mu: Piecewise | arg = T; pieces = {293.0, 1073.16, 4.783492E10-2.376622E7*T^1}; argunit = K; fununit = Pa
      kappa: Piecewise | arg = T; pieces = {293.0, 1073.16, 1.056124E11+4.642769E7*T^1-82798.6*T^2}; argunit = K; fununit = Pa

Physics
  solid: SolidMechanics on all domains
    dependent variable u = {u, v, w}
    lemm1: LinearElasticModel "Linear Elastic Material 1" (default)
    free1: Free (default)
    init1: init "Initial Values 1" (default)
    fix1: Fixed "Fixed Constraint 1" on boundaries 1
    bndl1: BoundaryLoad on boundaries 14 | LoadType = FollowerPressure; Ftot = {0, 0, -40}; FollowerPressure = 45700

Mesh
  mesh1 "Mesh 1"
    size: MeshSizeDefault | hauto = 4
    ftet1: FreeTet "Free Tetrahedral 1" on remaining entities | optcurved = on

Studies
  std1 "Study 1"
    stat: Stationary

Solver configurations
  sol1 "Solution 1" (study std1)
    v1: Variables "Dependent Variables 1"
    s1: Stationary "Stationary Solver 1"
      fc1: FullyCoupled | linsolver = d1
      d1: Direct "Suggested Direct Solver (solid)" | linsolver = pardiso; pivotperturb = 1.0E-9; nliniterrefine = on

Datasets
  dset1: Solution | solution = none
  dset2: Solution | solution = sol1

Plots
  pg1: PlotGroup3D "3D Plot Group 1" | data = dset1
    surf1: Surface | data = dset2; expr = solid.mises
  pg2: PlotGroup3D "Stress (solid)" | data = dset2
    vol1: Volume | expr = solid.mises
      def: Deform "Deformation" | expr = {u, v, w}; descr = Displacement field

Methods
  Rodmethod1: CodeEditor "method1"
    public class Rodmethod1 extends ApplicationMethod {
      public void execute() {
        model.label("Patient-Inspired Computational Design and FEA of NiTi Spinal Rods for Scoliosis Correction");
        String OUTPUT_PATH = "D:\\COMSOL_\\Patient_Inspired_NiTi_Spinal_Rod_FEA.mph";
        // ==================================================================
        // COMPONENT + GEOMETRY
        // ==================================================================
        model.component().create("comp1");
        model.component("comp1").geom().create("geom1", 3);
        model.component("comp1").geom("geom1").lengthUnit("mm");
        // ==================================================================
        // 1. PARAMETERS
        // ==================================================================
        model.param().set("n_vert", "10");
        model.param().set("vertebral_spacing", "22[mm]");
        model.param().set("vertebral_width", "35[mm]");
        model.param().set("vertebral_depth", "25[mm]");
        model.param().set("vertebral_height", "14[mm]");
        model.param().set("disc_height", "6[mm]");
        model.param().set("scoliosis_curvature", "28[mm]");
        model.param().set("spine_length", "n_vert*(vertebral_height+disc_height)");
        model.param().set("rod_diameter", "5.5[mm]");
        model.param().set("rod_curvature", "0.5");
        model.param().set("rod_post_offset", "20[mm]");
        model.param().set("screw_diameter", "5[mm]");
        model.param().set("screw_length", "12[mm]");
        model.param().set("vert_E", "100[MPa]");
        model.param().set("vert_nu", "0.3");
        model.param().set("vert_rho", "1900[kg/m^3]");
        model.param().set("disc_E", "4[MPa]");
        model.param().set("disc_nu", "0.45");
        model.param().set("disc_rho", "1100[kg/m^3]");
        model.param().set("NiTi_E", "60[GPa]");
        model.param().set("NiTi_nu", "0.33");
        model.param().set("NiTi_rho", "6450[kg/m^3]");
        model.param().set("screw_E", "110[GPa]");
        model.param().set("screw_nu", "0.34");
        model.param().set("screw_rho", "4500[kg/m^3]");
        model.param().set("applied_load", "40[N]");
        // ==================================================================
        // 2. GEOMETRY
        // ==================================================================
        model.component("comp1").geom("geom1").selection()
          .create("csel_vertebrae", "CumulativeSelection");
        model.component("comp1").geom("geom1").selection("csel_vertebrae")
          .label("Vertebral bodies");
        model.component("comp1").geom("geom1").selection()
          .create("csel_discs", "CumulativeSelection");
        model.component("comp1").geom("geom1").selection("csel_discs")
          .label("Intervertebral discs");
        model.component("comp1").geom("geom1").selection()
          .create("csel_rod", "CumulativeSelection");
        model.component("comp1").geom("geom1").selection("csel_rod")
          .label("NiTi rod");
        model.component("comp1").geom("geom1").selection()
          .create("csel_fixation", "CumulativeSelection");
        model.component("comp1").geom("geom1").selection("csel_fixation")
          .label("Fixation connectors");
        int nSeg = 10;
        // --- Vertebrae + Discs + Fixation connectors ---
        for (int i = 0; i < nSeg; i++) {
          // Vertebra (ellipsoid)
          String ellTag = "ell"+(i+1);
          model.component("comp1").geom("geom1").create(ellTag, "Ellipsoid");
          model.component("comp1").geom("geom1").feature(ellTag).set("semiaxes",
                                                                     new String[]{"vertebral_width/2", "vertebral_depth/2", "vertebral_height/2"});
          model.component("comp1").geom("geom1").feature(ellTag).set("pos", new String[]{
            "scoliosis_curvature*sin(pi*"+i+"*(vertebral_height+disc_height)/spine_length)",
            "0",
            i+"*(vertebral_height+disc_height)"
          });
          model.component("comp1").geom("geom1").feature(ellTag)
            .set("contributeto", "csel_vertebrae");
          // Intervertebral disc (cylinder)
          if (i < nSeg-1) {
            String discTag = "disc"+(i+1);
            model.component("comp1").geom("geom1").create(discTag, "Cylinder");
            model.component("comp1").geom("geom1").feature(discTag)
              .set("r", "vertebral_width/2*0.85");
            model.component("comp1").geom("geom1").feature(discTag)
              .set("h", "disc_height");
            model.component("comp1").geom("geom1").feature(discTag).set("pos", new String[]{
              "scoliosis_curvature*sin(pi*("+i+"+0.5)*(vertebral_height+disc_height)/spine_length)",
              "0",
              i+"*(vertebral_height+disc_height)+vertebral_height/2"
            });
            model.component("comp1").geom("geom1").feature(discTag)
              .set("axis", new String[]{"0", "0", "1"});
            model.component("comp1").geom("geom1").feature(discTag)
              .set("contributeto", "csel_discs");
          }
          // Fixation connector (small cylinder at posterior)
          String fixTag = "fix"+(i+1);
          model.component("comp1").geom("geom1").create(fixTag, "Cylinder");
          model.component("comp1").geom("geom1").feature(fixTag)
            .set("r", "screw_diameter/2");
          model.component("comp1").geom("geom1").feature(fixTag)
            .set("h", "screw_length");
          model.component("comp1").geom("geom1").feature(fixTag).set("pos", new String[]{
            "scoliosis_curvature*sin(pi*"+i+"*(vertebral_height+disc_height)/spine_length)",
            "vertebral_depth/2*0.9",
            i+"*(vertebral_height+disc_height)"
          });
          model.component("comp1").geom("geom1").feature(fixTag)
            .set("axis", new String[]{"0", "1", "0"});
          model.component("comp1").geom("geom1").feature(fixTag)
            .set("contributeto", "csel_fixation");
        }
        // --- NiTi rod: built from connected cylinders (NOT a sweep) ---
        int nRodSegments = 15;
        double totalLength = 10.0*(14.0+6.0);
        double[] px = new double[nRodSegments+1];
        double[] py = new double[nRodSegments+1];
        double[] pz = new double[nRodSegments+1];
        for (int i = 0; i <= nRodSegments; i++) {
          double f = (double) i/(double) nRodSegments;
          px[i] = 0.5*28.0*Math.sin(Math.PI*f);
          py[i] = 20.0;
          pz[i] = f*totalLength*0.92;
        }
        for (int i = 0; i < nRodSegments; i++) {
          String tag = "rodseg"+(i+1);
          double dx = px[i+1]-px[i];
          double dy = py[i+1]-py[i];
          double dz = pz[i+1]-pz[i];
          double length = Math.sqrt(dx*dx+dy*dy+dz*dz);
          double ax = dx/length;
          double ay = dy/length;
          double az = dz/length;
          model.component("comp1").geom("geom1").create(tag, "Cylinder");
          model.component("comp1").geom("geom1").feature(tag)
            .set("r", "rod_diameter/2");
          model.component("comp1").geom("geom1").feature(tag)
            .set("h", Double.toString(length)+"[mm]");
          model.component("comp1").geom("geom1").feature(tag).set("pos", new String[]{
            Double.toString(px[i])+"[mm]",
            Double.toString(py[i])+"[mm]",
            Double.toString(pz[i])+"[mm]"
          });
          model.component("comp1").geom("geom1").feature(tag).set("axis", new String[]{
            Double.toString(ax),
            Double.toString(ay),
            Double.toString(az)
          });
          model.component("comp1").geom("geom1").feature(tag)
            .set("contributeto", "csel_rod");
        }
        // --- Build the geometry ---
        model.component("comp1").geom("geom1").run();
        // ==================================================================
        // 3. MATERIALS
        // ==================================================================
        model.component("comp1").material().create("mat_vertebra", "Common");
        model.component("comp1").material("mat_vertebra")
          .label("Vertebral bone");
        model.component("comp1").material("mat_vertebra").selection()
          .named("geom1_csel_vertebrae");
        model.component("comp1").material("mat_vertebra")
          .propertyGroup("def").set("youngsmodulus", "vert_E");
        model.component("comp1").material("mat_vertebra")
          .propertyGroup("def").set("poissonsratio", "vert_nu");
        model.component("comp1").material("mat_vertebra")
          .propertyGroup("def").set("density", "vert_rho");
        model.component("comp1").material().create("mat_disc", "Common");
        model.component("comp1").material("mat_disc").label("Intervertebral disc");
        model.component("comp1").material("mat_disc").selection()
          .named("geom1_csel_discs");
        model.component("comp1").material("mat_disc")
          .propertyGroup("def").set("youngsmodulus", "disc_E");
        model.component("comp1").material("mat_disc")
          .propertyGroup("def").set("poissonsratio", "disc_nu");
        model.component("comp1").material("mat_disc")
          .propertyGroup("def").set("density", "disc_rho");
        model.component("comp1").material().create("mat_niti", "Common");
        model.component("comp1").material("mat_niti").label("NiTi rod");
        model.component("comp1").material("mat_niti").selection()
          .named("geom1_csel_rod");
        model.component("comp1").material("mat_niti")
          .propertyGroup("def").set("youngsmodulus", "NiTi_E");
        model.component("comp1").material("mat_niti")
          .propertyGroup("def").set("poissonsratio", "NiTi_nu");
        model.component("comp1").material("mat_niti")
          .propertyGroup("def").set("density", "NiTi_rho");
        model.component("comp1").material().create("mat_fixation", "Common");
        model.component("comp1").material("mat_fixation").label("Fixation screws");
        model.component("comp1").material("mat_fixation").selection()
          .named("geom1_csel_fixation");
        model.component("comp1").material("mat_fixation")
          .propertyGroup("def").set("youngsmodulus", "screw_E");
        model.component("comp1").material("mat_fixation")
          .propertyGroup("def").set("poissonsratio", "screw_nu");
        model.component("comp1").material("mat_fixation")
          .propertyGroup("def").set("density", "screw_rho");
        // ==================================================================
        // 4. PHYSICS
        // ==================================================================
        model.component("comp1").physics().create("solid", "SolidMechanics", "geom1");
        model.component("comp1").physics("solid").label("Solid Mechanics");
        // --- Fixed at bottom (Box selection targeting bottom vertebra) ---
        model.component("comp1").selection().create("sel_fixed", "Box");
        model.component("comp1").selection("sel_fixed").set("entitydim", 2);
        model.component("comp1").selection("sel_fixed").set("xmin", -200.0);
        model.component("comp1").selection("sel_fixed").set("xmax", 200.0);
        model.component("comp1").selection("sel_fixed").set("ymin", -200.0);
        model.component("comp1").selection("sel_fixed").set("ymax", 200.0);
        model.component("comp1").selection("sel_fixed").set("zmin", -50.0);
        model.component("comp1").selection("sel_fixed").set("zmax", 10.0);
        model.component("comp1").physics("solid").create("fix1", "Fixed", 2);
        model.component("comp1").physics("solid").feature("fix1").selection()
          .named("sel_fixed");
        // --- Load at top (Box selection targeting top vertebra) ---
        model.component("comp1").selection().create("sel_load", "Box");
        model.component("comp1").selection("sel_load").set("entitydim", 2);
        model.component("comp1").selection("sel_load").set("xmin", -200.0);
        model.component("comp1").selection("sel_load").set("xmax", 200.0);
        model.component("comp1").selection("sel_load").set("ymin", -200.0);
        model.component("comp1").selection("sel_load").set("ymax", 200.0);
        model.component("comp1").selection("sel_load").set("zmin", 170.0);
        model.component("comp1").selection("sel_load").set("zmax", 250.0);
        model.component("comp1").physics("solid").create("load1", "BoundaryLoad", 2);
        model.component("comp1").physics("solid").feature("load1").selection()
          .named("sel_load");
        model.component("comp1").physics("solid").feature("load1")
          .set("LoadType", "Force");
        model.component("comp1").physics("solid").feature("load1")
          .set("Ftot", new String[]{"0.3*applied_load", "0", "-applied_load"});
        // ==================================================================
        // 5. MESH (very coarse — avoids self-intersection)
        // ==================================================================
        model.component("comp1").mesh().create("mesh1");
        model.component("comp1").mesh("mesh1").feature("size").set("hauto", 8);
        model.component("comp1").mesh("mesh1").create("ftet1", "FreeTet");
        model.component("comp1").mesh("mesh1").run();
        // ==================================================================
        // 6. STUDY + SOLVE
        // ==================================================================
        model.study().create("std1");
        model.study("std1").label("Stationary analysis");
        model.study("std1").create("stat1", "Stationary");
        model.sol().create("sol1");
        model.sol("sol1").study("std1");
        model.sol("sol1").createAutoSequence("std1");
        model.sol("sol1").runAll();
        // ==================================================================
        // 7. RESULTS
        // ==================================================================
        model.result().create("pg_disp", "PlotGroup3D");
        model.result("pg_disp").label("Total displacement");
        model.result("pg_disp").create("surf_disp", "Surface");
        model.result("pg_disp").feature("surf_disp").set("expr", "solid.disp");
        model.result().create("pg_vm", "PlotGroup3D");
        model.result("pg_vm").label("von Mises stress");
        model.result("pg_vm").create("surf_vm", "Surface");
        model.result("pg_vm").feature("surf_vm").set("expr", "solid.mises");
        model.result().create("pg_strain", "PlotGroup3D");
        model.result("pg_strain").label("Equivalent elastic strain");
        model.result("pg_strain").create("surf_strain", "Surface");
        model.result("pg_strain").feature("surf_strain").set("expr", "solid.evol");
        model.result().create("pg_rodstress", "PlotGroup3D");
        model.result("pg_rodstress").label("NiTi rod stress");
        model.result("pg_rodstress").create("surf_rodstress", "Surface");
        model.result("pg_rodstress").feature("surf_rodstress").set("expr", "solid.mises");
        model.result("pg_rodstress").feature("surf_rodstress").selection()
          .named("geom1_csel_rod");
        // ==================================================================
        // 8. SAVE
        // ==================================================================
        try {
          model.save(OUTPUT_PATH);
          System.out.println("================================================");
          System.out.println("COMSOL MODEL SAVED SUCCESSFULLY");
          System.out.println(OUTPUT_PATH);
          System.out.println("================================================");
        } catch (java.io.IOException e) {
          System.out.println("================================================");
          System.out.println("SAVE FAILED");
          System.out.println(e.getMessage());
          System.out.println("================================================");
        }
      }
    }